# LAMMPS input, deepmd-kit version. Built from bulk water calculation.

units           metal
boundary        p p p
atom_style      atomic

neighbor        2.0 bin
neigh_modify    every 10 delay 0 check no

read_data       structure.lmp
mass            1 16
mass            2 2

pair_style	    deepmd ./graph.pb
pair_coeff      * *

velocity        all create 330.0 23456789

fix             1 all nvt temp 330.0 330.0 0.5
timestep        0.0005
thermo_style    custom step pe ke etotal temp press vol
thermo          100
dump            1 all custom 100 structure.dump id type x y z

run             100
